# CICLO MOTOR (m)
P_m1 := 1 bar
PCI := (42*10^6) J/kg
T_m1 := 55 °C
F_m := 1/15
r_c := 8
P_m6 := 1*P_m1 = 100000 Pa
η_t := 1
Cilindrada := 2000 cm^3
V_c := Cilindrada/4 = 0.5 L
V_m2 := V_c/(r_c - 1) = 0.0714286 L
V_m1 := V_m2*r_c = 0.571429 L
c_p := 1007 J/(kg*K)
c_v := 719.5 J/(kg*K)
γ := c_p/c_v = 1.39958
R := c_p - c_v = 287.5 m^2/(s^2*K)
m_aire := P_m1*V_m1/(R*T_m1) = 0.000605692 kg
# 1-2  Compresión adiabática reversible (S=cte)
P_m2 := P_m1*r_c^(γ - 1) = 229541 Pa
T_m2 := T_m1*r_c^(γ - 1) = 753.237 K
# 2-3  Adicción de calor a volumen constante
c_p := 1087 J/(kg*K)
c_v := 800.1 J/(kg*K)
γ := c_p/c_v = 1.35858
R := c_p - c_v = 286.9 m^2/(s^2*K)
m_c := m_aire*F_m = 4.03795e-5 kg
V_m3 := V_m2 = 0.0714286 L
Q_abs := m_c*PCI*0.35
# (suponiendo que la adiccion de calor se produce a partes iguales entre el proceso 2-3 y el 3-4)
Q_m23 := Q_abs/2 = 296.789 J
m_p := m_aire + m_c = 0.000646071 kg
T_m3 := Q_m23/(m_aire*c_p) + T_m2 = 1204.02 K
P_m3 := m_p*R*T_m3/V_m3 = 3124442 Pa
# 3-4  Adicción de calor a presión constante
c_p := 1241 J/(kg*K)
c_v := 953.5 J/(kg*K)
γ := c_p/c_v = 1.30152
R := c_p - c_v = 287.5 m^2/(s^2*K)
P_m4 := P_m3 = 3124442 Pa
Q_m34 := Q_abs/2
T_m4 := Q_m34/(m_aire*c_p) + T_m3 = 1598.86 K
V_m4 := m_p*R*T_m4/P_m4 = 0.095051 L
# 4-5  Expansión adiabática reversible (S=cte)
V_m5 := V_m1 = 0.571429 L
T_m5 := T_m4*(V_m4/V_m5)^(γ - 1) = 930.947 K
P_m5 := P_m4*(V_m4/V_m5)^γ = 302609 Pa
# 5-6  Expansión internamente isentrópica hasta presión de escape
T_m6 := T_m5*(P_m6/P_m5)^((γ - 1)/γ) = 720.311 K
T_m6 = 447.161 °C
# GASES ESCAPE
V_e := m_p*R*T_m6/P_m1 = 1.33795 L
# motor de 4 tiempos ->1 ciclo cada 2 revoluciones
#
# 4 cilindros ->1 cilo cada 1/2 revolcion ->2 ciclos cada revolucion
v_giro := 2500*1/min
v_giro = 41.6667 1/s
m_e := 2*m_p*v_giro = 0.0538393 kg/s
v_e := 2*V_e*v_giro = 111.495 L/s
v_e = 0.111495 m^3/s
